*HEADING
ANSA MCP disposable API validation - not an engineering solution
*NODE
1,0,0,0
2,10,0,0
3,10,10,0
4,0,10,0
5,0,0,1
6,10,0,1
7,10,10,1
8,0,10,1
*ELEMENT,TYPE=S4,ELSET=LOWER
1,1,2,3,4
*ELEMENT,TYPE=S4,ELSET=UPPER
2,5,6,7,8
*MATERIAL,NAME=STEEL
*ELASTIC
210000.,0.3
*DENSITY
7.85e-9
*SHELL SECTION,ELSET=LOWER,MATERIAL=STEEL
0.5
*SHELL SECTION,ELSET=UPPER,MATERIAL=STEEL
0.5
*SURFACE,TYPE=ELEMENT,NAME=MASTER
LOWER,SPOS
*SURFACE,TYPE=ELEMENT,NAME=SLAVE
UPPER,SNEG
*SURFACE INTERACTION,NAME=FRICTIONLESS
*SURFACE BEHAVIOR,PRESSURE-OVERCLOSURE=HARD
*CONTACT PAIR,INTERACTION=FRICTIONLESS,TYPE=SURFACE TO SURFACE
SLAVE,MASTER
*BOUNDARY
1,1,6
4,1,6
*STEP,NAME=LOAD
*STATIC
1.,1.
*CLOAD
6,3,-1.
7,3,-1.
*END STEP
